dBm := 1
dB := 1
f := 902*MHz
P_t := 25*dBm
G_t := 10
G_r := 3*dB
l_fs(d) := (4*π*f*d/c)^2
P_r(d) := P_t + G_t - 10*log(l_fs(d)) + G_r
P_r(400*km) = -105.593
dBW := 1
l(f, r) := (4*π*r*f/c)^2
G_dish(f, d, e_A) := 10*log((π*f*d/c)^2*e_A)
P_t(f, S, r, G_r, G_t) := S + 10*log(l(f, r)) - G_r - G_t
G_dish(915*MHz, 2*m, 0.6) = 23.4371
G_rx := 9
G_tx := 6
f_c := 915*MHz
d := 400*km
R_d := 75*kHz
S_r := -129*dBW
P_t(f_c, S_r, d, G_rx, G_tx) = -0.282595
P_t(915*MHz, 400*km) =  # error: This function requires at least {0} arguments but is applied to {1}.
