# Unlicensed Radio Operation in the 70 cm Band
# Lou Nigra
# Rev 0.1 May 2014
# This is a summary based ultimately on the actual FCC governing document [1] but summaries can also be found in [2] and [3]. The information here should be consistent with those other sources.
# Fig. 1 is extracted from a table in [2] covering the 70 cm band. The "Det" column indicates which type of detector that should be used for the measurement. "A" means something that provides an average equivalent of the field strength. "Q" is a quasi-peak detector (see notes below).
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# ...
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# Constants and functions:
η_0 := 377*Ω  # Impedance of free-space (ratio of electric field to magnetic field of a traveling wave.
# Effective Isotropically Radiated Power (EIRP) for a given antenna gain (g_t), electric field strength (E_r) at distance r.
p_0(g_t, r, E_r) := 4*π*r^2*E_r^2/(η_0*g_t)
# Usage case 1: Intermittent Control Signals
# 15.231(a)(1): Intermittent Control Signals that are triggered manuallly must terminate automatically within 5 seconds of transmit switch release and have a power limit equal to the average limit specified. How often you can push the button isn't quite clear.
E_int(f, r) := r/(3 m)*(125/3*f/(10^6*Hz) - 212500/3)*μV/m
f := 435*MHz
r := 3*m
g_t := 2
E_r := E_int(f, r) = -52708.3 μV/m
P_EIRP := 10*log(p_0(g_t, r, E_r)/W) = -33.8016
# 15.35(b): Peak fundamental emission is limited to 20 dB higher than average emission. BUT average measurements are limited to a 100ms window, so if continuous transmit time is more than 100ms, it's effectively a peak power measurement.
# Usage case 2: Unrestricted with Periodic Control Signals
# 15:231(b)(2): The "Q" detector option is at the discretion of the manufacturer, but the method must be explained. Unlike the "A" detector, the measurement time is apparently not specified in Part 15 for the "Q" detector.
#
# Looking at the document for the CISPR Quasi-Peak detector[4], clause 8.3, the measurement time needs to be at least one period for a periodic transmission. So, the measurement will be reduced by approximately the duty cycle and therefore the allowed peak transmitted power will be increased.
#
# This option should therefore be exercised for the unrestricted periodic transmission use case.
# 15.231(e): Unrestricted usage with periodic transmission with T_ON > 100*ms:
E_per(f, r) := r/(3 m)*(50/3*f/(10^6*Hz) - 8500/3)*μV/m
# With an "A" detector, this would actually be a peak measurement. With a "Q" detector, the measurement time is a full on-off cycle, so is more of an average.
#
# The CISPR quasi-peak detector has a 1 ms attack time and 500 ms decay time. Modeling both as exponential functions (which should be very close to the real behavior), it's equivalent to subtracting 1ms from the on time at the beginning of the pulse and then extending it by 500 ms at the end of the pulse. Precisely, its like adding 499 ms to the transmit time.
# The actual on time and off time are constrained by:
T_OFF/T_ON > 30
T_ON < 1*sec
# For maximum throughput:
10.333*sec < T_per < 31*sec
# Applying the effects of the Q detector on the effective Duty Cycle (DC'):
T'_ON == T_ON + 0.499*sec
T'_OFF == T_per - T'_ON
DC == T'_OFF/T'_ON
DC'(T_per, T_ON) := (T_per/(T_ON + 0.499*sec) - 1)^-1
T_per1 := 10.333*sec
T_ON1 := 0.333*sec
DC'(T_per1, T_ON1) = 0.0875697
T_per2 := 31*sec
T_ON2 := 1*sec
# EIRP:
f := 435*MHz
g_t := 2
r := 3*m
E_r := E_per(f, r) = 4416.67 μV/m  # Specified average value.
# Peak transmitted EIRP allowed using "Q" detector for the range of allowed periods and pulse widths:
# Case 1:
T_per := 10.333*sec
T_ON := 0.333*sec
P_EIRP := 10*log(p_0(g_t, r, E_r)*DC'(T_per, T_ON)^-1/mW) = -14.7608
# Case 2:
T_per := 31*sec
T_ON := 1*sec
P_EIRP := 10*log(p_0(g_t, r, E_r)*DC'(T_per, T_ON)^-1/mW) = -12.3969
# No surprise here, the longer period is less affected by the decay time of the detector, so allows a higher peak EIRP.
# References
# [1] Rules and Regulations for Title 47 CFR, Part 15, Federal Communications Commission
#
# [2] Understanding the FCC Regulations for low-power, non-licensed Transmitters, Federal Communications Commision OET Bulletin No. 63, October 1993
#
# [3] SRD regulations for licence free transceiver operation, P. M. Evjen, Chipcon/TI Application Note AN001
#
# [4] Specification for radio disturbance and immunity measuring apparatus and methods – Part 2-3, International Electrotechnical Commission, CISPR 16-2-3 2006-2007
